n := 7
r := 2^n = 128
m := 21
b := [0; 1; 0; 1; 0; 0; 0; 0]
a := 24
b := 10
x := a
e := [0; 1; 0; 1; 0; 0; 0; 0]
e := sum(e[i]*2^i, i = 0 .. n - 1) = 10
A := mod(a*r, m) = 6
y_00 := mod(1*r, m) = 2
i == 0
z_00 := x
S_00 := 0
# for i == 0 to n - 1 = 6 do
q_0 := mod(S_00, 2) = 0
i == 0
mod(x^e, m) = 18
mod(a*b, m) = 9
S_0 := floor((S_00 - q_0)/2) + q_0*floor((m + 1)/2) + b[0]*A = 0
e[0] = 0
y_0 := y_00 = 2
x^e = 63403380965376
gcd(r, m) = 1
z_0 := mod(z_00*z_00, m) = 9
i == 1
q_1 := mod(S_0, 2) = 0
i == 1
e[1] = 1
y_1 := mod(y_0*z_0, m) = 18
S_1 := floor((S_0 - q_1)/2) + q_1*floor((m + 1)/2) + b[1]*A = 6
z_1 := mod(z_0*z_0, m) = 18
i == 2
i == 2
q_2 := mod(S_1, 2) = 0
e[2] = 0
y_2 := y_1 = 18
S_2 := floor((S_1 - q_2)/2) + q_2*floor((m + 1)/2) + b[2]*A = 3
z_2 := mod(z_1*z_1, m) = 9
i == 3
i == 3
q_3 := mod(S_2, 2) = 1
e[3] = 1
y_3 := mod(y_2*z_2, m) = 15
S_3 := floor((S_2 - q_3)/2) + q_3*floor((m + 1)/2) + b[3]*A = 18
z_3 := mod(z_2*z_2, m) = 18
i == 4
i == 4
q_4 := mod(S_3, 2) = 0
e[4] = 0
y_4 := y_3 = 15
S_4 := floor((S_3 - q_4)/2) + q_4*floor((m + 1)/2) + b[4]*A = 9
z_4 := mod(z_3*z_3, m) = 9
i == 5
i == 5
q_5 := mod(S_4, 2) = 1
e[5] = 0
y_5 := y_4 = 15
S_5 := floor((S_4 - q_5)/2) + q_5*floor((m + 1)/2) + b[5]*A = 15
z_5 := mod(z_4*z_4, m) = 18
i == 6
i == 6  # FOR n == 7
e[6] = 0
y_6 := y_5 = 15
q_6 := mod(S_5, 2) = 1
S_6 := floor((S_5 - q_6)/2) + q_6*floor((m + 1)/2) + b[6]*A = 18
z_6 := mod(z_5*z_5, m) = 9
i == 7  # FOR n == 8
i == 7  # FOR n == 7
e[7] = 0
y_7 := y_6 = 15
q_7 := mod(S_6, 2) = 0
z_7 := mod(z_6*z_6, m) = 18
S_7 := floor((S_6 - q_7)/2) + q_7*floor((m + 1)/2) + b[7]*A = 9
i == 8  # FOR n == 8
q_8 := mod(S_7, 2) = 1
S_8 := floor((S_7 - q_8)/2) + q_8*floor((m + 1)/2) + b[7]*A = 15
