n := 8
# KILDER & LINKS:
# http://www.jstor.org/stable/pdf/2007970.pdf
# http://www.acsel-lab.com/arithmetic/arith11/papers/ARITH11_Shand.pdf
# http://www.acsel-lab.com/arithmetic/arith11/papers/ARITH11_Kornerup.pdf
# http://ieeexplore.ieee.org/document/957732/
#
# https://drive.google.com/drive/folders/0B6eJjrZzidlob08wcHg5bHAxd2M
# https://www.overleaf.com/9477295jttmtsqhcdpk#/34321867/
m := 57
r := 2^n
mod(30*r, m) = 42
mod(1*r, m) = 28
mod(45*r, m) = 6
A := 30
B := 27
mod(A*B, m) = 12
T := A*B = 810
M´ := mod(-1/m, r) = -0.0175439
P := (T + mod(T*M´, m))/r = 3.10855
A(a, n) := sum(a[i]*2^i, i = 0 .. n)
